units            metal
dimension        3
boundary         p p p


atom_style       atomic
lattice          bcc $base
region           whole block 0 $111 0 $222 0 $333 units lattice
create_box       1  whole
create_atoms     1 region whole
mass             1 39.0983

pair_style mlip      load_from=$ini
                                extrapolation_control=true
                                threshold_save=2.1
                                threshold_break=10
                                save_extrapolative_to=preselected.cfg
pair_coeff * *

neighbor	0.5 bin
neigh_modify    every 1 delay 5 check yes

timestep	0.001

fix		1 all nve
fix		2 all langevin $ttt $ttt 0.1 826234 zero yes

thermo_style    custom step temp
thermo 1000


run             100000
reset_timestep  0
